<?xml version="1.0" ?>
<Node name="root" dt="0.05" gravity="0 0 0">
    <Node name="RequiredPlugins">
        <RequiredPlugin name="Sofa.Component.AnimationLoop"/> <!-- Needed to use components [FreeMotionAnimationLoop] -->
        <RequiredPlugin name="Sofa.Component.Collision.Detection.Algorithm"/> <!-- Needed to use components [BVHNarrowPhase,BruteForceBroadPhase,CollisionPipeline] -->
        <RequiredPlugin name="Sofa.Component.Collision.Detection.Intersection"/> <!-- Needed to use components [LocalMinDistance] -->
        <RequiredPlugin name="Sofa.Component.Collision.Geometry"/> <!-- Needed to use components [LineCollisionModel,PointCollisionModel,TriangleCollisionModel] -->
        <RequiredPlugin name="Sofa.Component.Collision.Response.Contact"/> <!-- Needed to use components [CollisionResponse] -->
        <RequiredPlugin name="Sofa.Component.Constraint.Lagrangian.Correction"/> <!-- Needed to use components [LinearSolverConstraintCorrection,PrecomputedConstraintCorrection] -->
        <RequiredPlugin name="Sofa.Component.Constraint.Lagrangian.Solver"/> <!-- Needed to use components [LCPConstraintSolver] -->
        <RequiredPlugin name="Sofa.Component.Haptics"/> <!-- Needed to use components [LCPForceFeedback] -->
        <RequiredPlugin name="Sofa.Component.IO.Mesh"/> <!-- Needed to use components [MeshGmshLoader,MeshOBJLoader] -->
        <RequiredPlugin name="Sofa.Component.LinearSolver.Direct"/> <!-- Needed to use components [SparseLDLSolver] -->
        <RequiredPlugin name="Sofa.Component.LinearSolver.Iterative"/> <!-- Needed to use components [CGLinearSolver] -->
        <RequiredPlugin name="Sofa.Component.Mapping.Linear"/> <!-- Needed to use components [IdentityMapping] -->
        <RequiredPlugin name="Sofa.Component.Mapping.NonLinear"/> <!-- Needed to use components [RigidMapping] -->
        <RequiredPlugin name="Sofa.Component.Mass"/> <!-- Needed to use components [DiagonalMass,UniformMass] -->
        <RequiredPlugin name="Sofa.Component.MechanicalLoad"/> <!-- Needed to use components [PlaneForceField] -->
        <RequiredPlugin name="Sofa.Component.ODESolver.Backward"/> <!-- Needed to use components [EulerImplicitSolver] -->
        <RequiredPlugin name="Sofa.Component.SceneUtility"/> <!-- Needed to use components [InfoComponent] -->
        <RequiredPlugin name="Sofa.Component.SolidMechanics.FEM.Elastic"/> <!-- Needed to use components [TetrahedronFEMForceField] -->
        <RequiredPlugin name="Sofa.Component.SolidMechanics.Spring"/> <!-- Needed to use components [RestShapeSpringsForceField] -->
        <RequiredPlugin name="Sofa.Component.StateContainer"/> <!-- Needed to use components [MechanicalObject] -->
        <RequiredPlugin name="Sofa.Component.Topology.Container.Constant"/> <!-- Needed to use components [MeshTopology] -->
        <RequiredPlugin name="Sofa.Component.Topology.Container.Dynamic"/> <!-- Needed to use components [TetrahedronSetGeometryAlgorithms,TetrahedronSetTopologyContainer,TetrahedronSetTopologyModifier,TriangleSetGeometryAlgorithms,TriangleSetTopologyContainer,TriangleSetTopologyModifier] -->
        <RequiredPlugin name="Sofa.Component.Topology.Container.Grid"/> <!-- Needed to use components [SparseGridRamificationTopology] -->
        <RequiredPlugin name="Sofa.Component.Topology.Mapping"/> <!-- Needed to use components [Tetra2TriangleTopologicalMapping] -->
        <RequiredPlugin name="Sofa.Component.Visual"/> <!-- Needed to use components [VisualStyle] -->
        <RequiredPlugin name="Sofa.GL.Component.Rendering3D"/> <!-- Needed to use components [OglModel] -->
        <RequiredPlugin name="Sofa.Component.Constraint.Projective"/> <!-- Needed to use components [FixedProjectiveConstraint] -->
        <RequiredPlugin name="Sofa.Component.Engine.Select"/> <!-- Needed to use components [BoxROI] -->
        <RequiredPlugin name="SofaHaplyRobotics"/>
    </Node>

    <VisualStyle displayFlags="showVisual showBehavior showForceFields showInteractionForceFields showCollision showCollisionModels showWireframe" />

    <FreeMotionAnimationLoop/>
    <LCPConstraintSolver tolerance="0.001" maxIt="1000"/>

    <CollisionPipeline name="pipeline" depth="6" verbose="0"/>
    <BruteForceBroadPhase/>
    <BVHNarrowPhase/>
    <CollisionResponse name="response" response="FrictionContactConstraint" />
    <LocalMinDistance name="proximity" alarmDistance="0.1" contactDistance="0.01" angleCone="0.1" />

    <Haply_Inverse3Controller name="Device" scale="60.0" drawDebug="0" positionBase="0 6 -4" orientationBase="0 0 -0.7071068 0.7071068 " damping="0.001"/>
    <MechanicalObject template="Rigid3d" name="HaplyMO" position="@Device.positionDevice" />

    <Node name="Instrument" >
        <EulerImplicitSolver name="ODE solver" rayleighStiffness="0.01" rayleighMass="0.1" />
        <SparseLDLSolver template="CompressedRowSparseMatrixMat3x3d"/>

		<MechanicalObject name="instrumentState" template="Rigid3" />
		<UniformMass name="mass" totalMass="1.0" />

		<RestShapeSpringsForceField stiffness='1000000' angularStiffness='1000000' external_rest_shape='@../HaplyMO' points='0' external_points='0'/>
        <LCPForceFeedback name="LCPFF1" activate="true" forceCoef="0.00005" />
        <LinearSolverConstraintCorrection />

		<Node name="VisuTool" >
            <MeshOBJLoader name="meshLoader_1" filename="./mesh/dental_instrument.obj" handleSeams="1"
                rotation="-90 -90 0" translation="0 -3.5 0.3"/>
            <OglModel name="InstrumentVisualModel" src="@meshLoader_1" color="1.0 0.2 0.2 1.0" />
            <RigidMapping name="MM->VM mapping" input="@instrumentState" output="@InstrumentVisualModel" />
        </Node>

        <Node name="CollisionModel" >
            <MeshOBJLoader name="loader" filename="./mesh/dental_instrument_centerline.obj"
                rotation="@../VisuTool/meshLoader_1.rotation" translation="@../VisuTool/meshLoader_1.translation"/>
            <MeshTopology src="@loader" name="InstrumentCollisionModel" />
            <MechanicalObject src="@loader" name="instrumentCollisionState" />
            <LineCollisionModel contactStiffness="600" radius="0.3" />
            <PointCollisionModel contactStiffness="600" radius="0.3" />
            <RigidMapping name="MM->CM mapping" input="@instrumentState" output="@instrumentCollisionState" />
        </Node>

    </Node>

    <Node name="Gum">
        <EulerImplicitSolver rayleighMass="0.2" rayleighStiffness="0.2" />
        <SparseLDLSolver template="CompressedRowSparseMatrixMat3x3d"/>

        <MeshOBJLoader name="loaderSurface" filename="./mesh/GumTest1.obj" scale3d="2 2 2" rotation="0 0 0" translation="0  0" />
        <SparseGridRamificationTopology name="grid" n="6 6 6" src="@./loaderSurface" nbVirtualFinerLevels="3" finestConnectivity="0"/>

        <MechanicalObject name="gridDof" position="@grid.position"/>

        <TetrahedronFEMForceField name="FEM" youngModulus="600000" poissonRatio="0.45" method="large" />
        <DiagonalMass totalMass="10.0" topology="@grid" geometryState="@gridDof"/>
        <RestShapeSpringsForceField name="shapeSprings" stiffness="6000" />

        <BoxROI name="boxRoi1" box="-0.892 -0.748 -1.105 0.930 -0.410 0.993" drawBoxes="1" />
        <FixedProjectiveConstraint indices="@boxRoi1.indices" />

        <LinearSolverConstraintCorrection />

        <Node name="MappingGum">
            <MechanicalObject name="dofs" position="@../loaderSurface.position"/>

            <TriangleSetTopologyContainer name="Container1" src="@../loaderSurface"/>
            <TriangleSetTopologyModifier />
            <TriangleSetGeometryAlgorithms template="Vec3d" />

            <TriangleCollisionModel bothSide="true" group="1" contactStiffness="600" />
            <LineCollisionModel group="1" contactStiffness="600" />
            <PointCollisionModel group="1" contactStiffness="600" />

            <BarycentricMapping input="@../gridDof" output="@dofs" />

            <Node name="VisuSurface">
                <OglModel name="Visual" src="@../../loaderSurface" texturename="textures/colorMap.png" />
                <IdentityMapping input="@.." output="@Visual" />
            </Node>
        </Node>
    </Node>
</Node>
